*HEADING
FEA case 0096
*NODE
1, 24.5, -413.3430786132812, 23.56776809692383
2, 24.5, -413.2370910644531, 23.6819896697998
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*ELEMENT, TYPE=S3, ELSET=EALL
1, 1, 2, 3
2, 4, 1, 3
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*MATERIAL, NAME=GI
*ELASTIC
200000, 0.27
*DENSITY
7850
*SHELL SECTION, ELSET=EALL, MATERIAL=GI
1.0
*BOUNDARY
149, 1, 6, 0.0
150, 1, 6, 0.0
151, 1, 6, 0.0
152, 1, 6, 0.0
153, 1, 6, 0.0
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2477, 1, 6, 0.0
*STEP
*STATIC
*CLOAD
815, 2, -58.293729
818, 2, -58.293729
819, 2, -58.293729
820, 2, -58.293729
821, 2, -58.293729
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1045, 2, -58.293729
*NODE FILE
U
*EL FILE
S, E
*END STEP
